*Heading
** Job name: newJob Model name: HE
** Generated by: Abaqus/CAE 2024
*Preprint, echo=NO, model=NO, history=NO, contact=NO
**
** PARTS
**
*Part, name=PART-1-1
*Node
      1, -0.134245932, 0.000500000024
      2, -0.134245932,  0.134745926
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*Element, type=CPE8RT
   1,    10,    71,   127,   115,   307,   320,   321,   322
   2,    71,    70,   128,   127,   306,   323,   324,   320
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*Nset, nset=SET-1, generate
     1,  18721,      1
*Elset, elset=SET-1, generate
    1,  6134,     1
** Section: Section-1-SET-1
*Solid Section, elset=SET-1, material=MAT1
,
*End Part
**
**
** ASSEMBLY
**
*Assembly, name=Assembly
**
*Instance, name=PART-1-1, part=PART-1-1
*End Instance
**
*Nset, nset=HSURFACE, instance=PART-1-1
     1,     5,    10,    11,    14,    16
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*Nset, nset=OUTERN, instance=PART-1-1
 10014, 10056, 10062, 10079, 10092, 10265
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*Nset, nset=SET-1, instance=PART-1-1
   637,   638,   639,   643,   644,   645
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*Elset, elset=SET-1, instance=PART-1-1
  277,  278,  279,  280,  281,  282
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*Nset, nset=SET-102, instance=PART-1-1, generate
     1,  18721,      1
*Elset, elset=SET-102, instance=PART-1-1, generate
    1,  6134,     1
*End Assembly
**
** MATERIALS
**
**  COMMENTS FROM *USER MATERIAL
**  ============================
**
**   E, v, Sy, N
*Material, name=MAT1
*Density
1.,
*Depvar
     16,
*User Material, constants=8, type=THERMAL
 0.01271,        4.,  2.02e+07,        0.,  5.86e+07, 8.464e+13,  1.15e+07, 8.464e+17
*User Material, constants=4, type=MECHANICAL
201880.,   0.3,  595., 0.059
**
** PREDEFINED FIELDS
**
** Name: Field-1   Type: Temperature
*Initial Conditions, type=TEMPERATURE
SET-102, 2.659e+11
** ----------------------------------------------------------------
**
** STEP: Step-1
**
*Step, name=Step-1, nlgeom=YES, amplitude=RAMP, inc=1000000
*Coupled Temperature-displacement, creep=none, deltmx=1e+13
0.0001, 1., 1e-25, 0.01
**
** BOUNDARY CONDITIONS
**
** Name: Disp-BC-1 Type: Displacement/Rotation
*Boundary
SET-1, 2, 2
** Name: Temp-BC-1 Type: Temperature
*Boundary
HSURFACE, 11, 11, 2.659e+13
**
** OUTPUT REQUESTS
**
*Restart, write, frequency=0
**
** FIELD OUTPUT: F-Output-1
**
*Output, field, frequency=100
*Element Output, directions=YES
E, HFL, LE, S, SDV, TEMP
**
** FIELD OUTPUT: F-Output-2
**
*Node Output
NT, RF, RFL, U
**
** HISTORY OUTPUT: H-Output-1
**
*Output, history, variable=PRESELECT
*End Step
